// SBML level 3 version 1

model main()

  // Compartments:
  compartment cell;

  // Species:
  substanceOnly species _56732aa744aec2b9344a07ff in cell; _56732aa744aec2b9344a07ff is "pLmrA.ref";

  // Reactions:
  _56732aa744aec2b9344a07ff_degradation: _56732aa744aec2b9344a07ff => ; y*_56732aa744aec2b9344a07ff/K_d/(1 + _56732aa744aec2b9344a07ff/K_d); _56732aa744aec2b9344a07ff_degradation is "pLmrA.ref_degradation";
    y = 1; K_d = 1;
  _56732aa744aec2b9344a07ff_expression: => _56732aa744aec2b9344a07ff; k_EXE; _56732aa744aec2b9344a07ff_expression is "pLmrA.ref_expression";
    k_EXE = 1;
end
