// SBML level 3 version 1

model main()

  // Compartments:
  compartment cell = 1;

  // Species:
  substanceOnly species AraC in cell = 0;
  substanceOnly species $aTc in cell = 100;
  substanceOnly species BFP in cell = 0;
  substanceOnly species $ara in cell = 100;
  substanceOnly species TetR in cell = 0;

  // Reactions:
  AraC_degradation: AraC => ; AraC_degradation_y*AraC/AraC_degradation_K_d/(1 + AraC/AraC_degradation_K_d);
    AraC_degradation_y = 26.62204; AraC_degradation_K_d = 90.32999;
  AraC_expression: => AraC; k_EXR/(1 + K_r*TetR^AraC_expression_n/(1 + AraC_expression_K_i*aTc));  // modifiers: TetR, aTc
    k_EXR = 44.48649; K_r = 47.31287; AraC_expression_K_i = 20.13535; AraC_expression_n = 2;
  BFP_degradation: BFP => ; BFP_degradation_y*BFP/BFP_degradation_K_d/(1 + BFP/BFP_degradation_K_d);
    BFP_degradation_y = 5.665003; BFP_degradation_K_d = 98.06182;
  BFP_expression: => BFP; k_EXA*K_a*AraC^BFP_expression_n*BFP_expression_K_i*ara/(1 + BFP_expression_K_i*ara)/(1 + K_a*AraC^BFP_expression_n*BFP_expression_K_i*ara/(1 + BFP_expression_K_i*ara));  // modifiers: AraC, ara
    k_EXA = 76.95536; K_a = 41.02277; BFP_expression_K_i = 62.30096; BFP_expression_n = 2;
  TetR_degradation: TetR => ; TetR_degradation_y*TetR/TetR_degradation_K_d/(1 + TetR/TetR_degradation_K_d);
    TetR_degradation_y = 61.71352; TetR_degradation_K_d = 28.34225;
  TetR_expression: => TetR; k_EXE;
    k_EXE = 49.2993;
end
