// SBML level 3 version 1

model main()

  // Compartments:
  compartment cell = 1;

  // Species:
  substanceOnly species regulated in cell = 563.8332;
  substanceOnly species expressee in cell = 2947.469;
  substanceOnly species $inducer in cell = 100;

  // Parameters:
  k_EXA = 0.5604002;
  K_a = 80.86054;
  K_i = 22.03635;

  // Reactions:
  regulated_degradation: regulated => ; y*regulated/K_d/(1 + regulated/K_d);
    y = 36.88748; K_d = 3.62522;
  regulated_expression: => regulated; k_EXA*K_a*expressee^n*K_i*inducer/(1 + K_i*inducer)/(1 + K_a*expressee^n*K_i*inducer/(1 + K_i*inducer));  // modifiers: expressee, inducer
    n = 2;
end
