// SBML level 3 version 1

model main()

  // Compartments:
  compartment cell;

  // Species:
  substanceOnly species _573433d944ae485fe68094c5 in cell; _573433d944ae485fe68094c5 is "pLmrA.ref";

  // Reactions:
  _573433d944ae485fe68094c5_degradation: _573433d944ae485fe68094c5 => ; y*_573433d944ae485fe68094c5/K_d/(1 + _573433d944ae485fe68094c5/K_d); _573433d944ae485fe68094c5_degradation is "pLmrA.ref_degradation";
    y = 1; K_d = 1;
  _573433d944ae485fe68094c5_expression: => _573433d944ae485fe68094c5; k_EXE; _573433d944ae485fe68094c5_expression is "pLmrA.ref_expression";
    k_EXE = 1;
end
