// SBML level 3 version 1

model main()

  // Compartments:
  compartment cell;

  // Species:
  substanceOnly species _573433d944ae485fe68094c5 in cell; _573433d944ae485fe68094c5 is "pLmrA.ref";

  // Parameters:
  _573433d944ae485fe68094c5_degradation_y = 1;
  _573433d944ae485fe68094c5_degradation_K_d = 1;
  _573433d944ae485fe68094c5_expression_k_EXE = 1;

  // Reactions:
  _573433d944ae485fe68094c5_degradation: _573433d944ae485fe68094c5 => ; _573433d944ae485fe68094c5_degradation_y*_573433d944ae485fe68094c5/_573433d944ae485fe68094c5_degradation_K_d/(1 + _573433d944ae485fe68094c5/_573433d944ae485fe68094c5_degradation_K_d); _573433d944ae485fe68094c5_degradation is "pLmrA.ref_degradation";
  _573433d944ae485fe68094c5_expression: => _573433d944ae485fe68094c5; _573433d944ae485fe68094c5_expression_k_EXE; _573433d944ae485fe68094c5_expression is "pLmrA.ref_expression";
end
